*Heading
** Job name: RealConcrete_3pb_Medium-P-OutPlane Model name: 3pb_Medium_P-OutPlane
** Generated by: Abaqus/CAE 6.14-2
*Preprint, echo=NO, model=NO, history=NO, contact=NO
**
** PARTS
**
*Part, name=Beam
*Node
      1,   380.299988,   165.100006,           0.
      2,   380.299988,   22.8999996,           0.
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*Element, type=C3D6
  1,  30,  29,  50, 508, 507, 584
  2,   1,   4,  29,  57,  65, 507
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*Element, type=S4R
21777,   20,  310, 4111,  422
21778,  310,  309, 4112, 4111
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*Nset, nset=Body, generate
     1,  13077,      1
*Elset, elset=Body, generate
     1,  21776,      1
*Nset, nset=COD
 5, 8
*Nset, nset=_Skin-3, internal
   19,   20,   21,   26,   27,   28
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*Elset, elset=_Skin-3, internal, generate
 21777,  22048,      1
*Nset, nset=_Skin-4, internal
   11,   12,   13,   14,   15,   16
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*Elset, elset=_Skin-4, internal, generate
 22049,  22320,      1
*Nset, nset=_PickedSet56, internal
   11,   12,   13,   14,   15,   16
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*Elset, elset=_PickedSet56, internal, generate
 21777,  22320,      1
*Elset, elset=_Top_S3, internal
     2,    26,    50,    74,    98,   122
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*Elset, elset=_Top_S4, internal
   240,  1590,  2940,  4290,  5640,  6990,  8340,  9690, 11092, 12440, 13788, 15136, 16484, 17832, 19180, 20528
*Surface, type=ELEMENT, name=Top
_Top_S3, S3
_Top_S4, S4
*Elset, elset=_BottomLeft_S3, internal
 11009, 11016, 11068, 11072, 11076, 11108
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*Elset, elset=_BottomLeft_S4, internal, generate
 11044,  20480,   1348
*Surface, type=ELEMENT, name=BottomLeft
_BottomLeft_S3, S3
_BottomLeft_S4, S4
*Elset, elset=_BottomRight_S3, internal
  215,  217,  223,  226,  256,  257
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*Elset, elset=_BottomRight_S4, internal, generate
  288,  9738,  1350
*Surface, type=ELEMENT, name=BottomRight
_BottomRight_S3, S3
_BottomRight_S4, S4
*Elset, elset=_Pressed_S3, internal
   313,   446,   447,  1663,  1796,  1797
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*Elset, elset=_Pressed_S4, internal, generate
  288,  9738,  1350
*Surface, type=ELEMENT, name=Pressed
_Pressed_S3, S3
_Pressed_S4, S4
*Elset, elset=_OutPlane_S2, internal
  9643,  9644,  9645,  9646,  9647,  9648
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*Elset, elset=_OutPlane_S1, internal
   193,   194,   195,   196,   197,   198
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*Surface, type=ELEMENT, name=OutPlane
_OutPlane_S2, S2
_OutPlane_S1, S1
** Section: M7
*Solid Section, elset=Body, material=M7FMATERIAL
,
** Section: PLASTIC
*Shell Section, elset=_PickedSet56, material=PLASTIC
5., 5
*End Part
**
*Part, name=Fixture
*Node
      1,           0.,   25.3999996,           0.
      2,           0.,   25.3999996,   9.76923084
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*Element, type=C3D8R
  1,  99, 100, 114, 113,   1,   2,  16,  15
  2, 100, 101, 115, 114,   2,   3,  17,  16
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*Node
    393,   25.3999996,   25.3999996,         127.
*Nset, nset=Fixture-RefPt_, internal
393,
*Nset, nset=Body, generate
   1,  392,    1
*Elset, elset=Body, generate
   1,  234,    1
*Nset, nset=Fixed, generate
  1,  98,   1
*Elset, elset=Fixed, generate
  1,  78,   1
*Nset, nset=RP
 393,
*Nset, nset=Line, generate
 43,  56,   1
*Elset, elset=Line, generate
 27,  52,   1
*Elset, elset=_Contact_S1, internal, generate
 157,  234,    1
*Surface, type=ELEMENT, name=Contact
_Contact_S1, S1
** Section: STEEL
*Solid Section, elset=Body, material=STEEL
,
*End Part
**
*Part, name=Support
*Node
      1,    23.776413,   7.72542477,           0.
      2,   20.2254257,   14.6946316,           0.
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*Element, type=C3D8R
  1,  25,  12,  10,   1,  54,  41,  39,  30
  2,  26,  23,  20,  18,  55,  52,  49,  47
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*Nset, nset=Body, generate
   1,  580,    1
*Elset, elset=Body, generate
   1,  380,    1
*Nset, nset=Fixed
  10,  11,  12,  13,  14,  15
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*Elset, elset=Fixed
   1,   6,  10,  13,  16,  19
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*Elset, elset=_Contact_S5, internal
   1,  14,  15,  21,  34,  35
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*Elset, elset=_Contact_S6, internal
   3,  11,  13,  18,  23,  31
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*Elset, elset=_Contact_S3, internal
   7,   9,  27,  29,  47,  49
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*Elset, elset=_Contact_S4, internal, generate
  20,  380,   20
*Surface, type=ELEMENT, name=Contact
_Contact_S5, S5
_Contact_S6, S6
_Contact_S4, S4
_Contact_S3, S3
** Section: STEEL
*Solid Section, elset=Body, material=STEEL
,
*End Part
**
**
** ASSEMBLY
**
*Assembly, name=Assembly
**
*Instance, name=Beam-1, part=Beam
*End Instance
**
*Instance, name=Fixture-1, part=Fixture
       317.5,        165.1,        -15.4
*End Instance
**
*Instance, name=Fixture-2, part=Fixture
       380.3,        165.1,        -15.4
*End Instance
**
*Instance, name=Support-1, part=Support
-6.69999999999998,        -63.2,        -23.4
*End Instance
**
*Instance, name=Support-2, part=Support
       755.3,        -63.2,        -23.4
*End Instance
**
** Constraint: Constraint-1
*Equation
2
Fixture-1.Line, 1, 1.
Fixture-1.RP, 1, -1.
** Constraint: Constraint-2
*Equation
2
Fixture-1.Line, 2, 1.
Fixture-1.RP, 2, -1.
** Constraint: Constraint-3
*Equation
2
Fixture-1.Line, 3, 1.
Fixture-1.RP, 3, -1.
** Constraint: Constraint-4
*Equation
2
Fixture-2.Line, 1, 1.
Fixture-2.RP, 1, -1.
** Constraint: Constraint-5
*Equation
2
Fixture-2.Line, 2, 1.
Fixture-2.RP, 2, -1.
** Constraint: Constraint-6
*Equation
2
Fixture-2.Line, 3, 1.
Fixture-2.RP, 3, -1.
*End Assembly
*Amplitude, name=Amp-1, definition=SMOOTH STEP
             0.,              0.,            0.15,              1.
*Amplitude, name=Amp-2, definition=SMOOTH STEP
             0.,              0.,            0.03,              1.
**
** MATERIALS
**
*Material, name=M7FMATERIAL
*Density
 2.4e-09,
*Depvar, delete=188
    199,
*User Material, constants=1
0.,
*Material, name=PLASTIC
*Density
 2.5e-09,
*Elastic
20000., 0.3
*Material, name=STEEL
*Density
 7.5e-09,
*Elastic
50000., 0.3
**
** INTERACTION PROPERTIES
**
*Surface Interaction, name=IntProp-1
*Friction
 0.05,
*Surface Behavior, pressure-overclosure=HARD
**
** BOUNDARY CONDITIONS
**
** Name: BC-1 Type: Displacement/Rotation
*Boundary
Support-1.Fixed, 1, 1
Support-1.Fixed, 2, 2
Support-1.Fixed, 3, 3
Support-1.Fixed, 4, 4
Support-1.Fixed, 5, 5
Support-1.Fixed, 6, 6
** Name: BC-2 Type: Displacement/Rotation
*Boundary
Support-2.Fixed, 1, 1
Support-2.Fixed, 2, 2
Support-2.Fixed, 3, 3
Support-2.Fixed, 4, 4
Support-2.Fixed, 5, 5
Support-2.Fixed, 6, 6
** ----------------------------------------------------------------
**
** STEP: Step-1
**
*Step, name=Step-1, nlgeom=NO
*Dynamic, Explicit
, 0.03
*Bulk Viscosity
2.4, 24.
**
** BOUNDARY CONDITIONS
**
** Name: BC-3 Type: Displacement/Rotation
*Boundary, amplitude=Amp-1
Fixture-1.RP, 1, 1
Fixture-1.RP, 2, 2
Fixture-1.RP, 3, 3
Fixture-1.RP, 4, 4
Fixture-1.RP, 5, 5
Fixture-1.RP, 6, 6
** Name: BC-4 Type: Displacement/Rotation
*Boundary, amplitude=Amp-1
Fixture-2.RP, 1, 1
Fixture-2.RP, 2, 2
Fixture-2.RP, 3, 3
Fixture-2.RP, 4, 4
Fixture-2.RP, 5, 5
Fixture-2.RP, 6, 6
**
** LOADS
**
** Name: Load-1   Type: Pressure
*Dsload, amplitude=Amp-2
Beam-1.Pressed, P, 10.0301
** Name: Load-2   Type: Pressure Using Field: AnalyticalField-1
*Dload, amplitude=Amp-2
Beam-1.9643, P2, 0.0001
Beam-1.9644, P2, 0.0001
Beam-1.9645, P2, 0.0001
Beam-1.9646, P2, 0.0001
Beam-1.9647, P2, 3.89266e-05
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Beam-1.12340, P1, 3.99332e-08
**
** INTERACTIONS
**
** Interaction: Int-1
*Contact Pair, interaction=IntProp-1, mechanical constraint=KINEMATIC, cpset=Int-1
Fixture-1.Contact, Beam-1.Top
** Interaction: Int-2
*Contact Pair, interaction=IntProp-1, mechanical constraint=KINEMATIC, cpset=Int-2
Fixture-2.Contact, Beam-1.Top
** Interaction: Int-3
*Contact Pair, interaction=IntProp-1, mechanical constraint=KINEMATIC, cpset=Int-3
Support-1.Contact, Beam-1.BottomLeft
** Interaction: Int-4
*Contact Pair, interaction=IntProp-1, mechanical constraint=KINEMATIC, cpset=Int-4
Support-2.Contact, Beam-1.BottomRight
**
** OUTPUT REQUESTS
**
*Restart, write, number interval=1, time marks=NO
**
** FIELD OUTPUT: F-Output-1
**
*Output, field, number interval=30
*Node Output
A, RF, U, V
*Element Output, directions=YES
EVF, LE, PE, PEEQ, S
*Contact Output
CSTRESS,
**
** HISTORY OUTPUT: H-Output-1
**
*Output, history
*Energy Output
ALLIE, ALLKE, ETOTAL
*End Step
** ----------------------------------------------------------------
**
** STEP: Step-2
**
*Step, name=Step-2, nlgeom=NO
*Dynamic, Explicit
, 0.15
*Bulk Viscosity
2.4, 24.
**
** BOUNDARY CONDITIONS
**
** Name: BC-3 Type: Displacement/Rotation
*Boundary, amplitude=Amp-1
Fixture-1.RP, 2, 2, -15.
** Name: BC-4 Type: Displacement/Rotation
*Boundary, amplitude=Amp-1
Fixture-2.RP, 2, 2, -15.
**
** OUTPUT REQUESTS
**
*Restart, write, number interval=1, time marks=NO
**
** FIELD OUTPUT: F-Output-1
**
*Output, field, number interval=200
*Node Output
A, RF, U, V
*Element Output, directions=YES
EVF, LE, PE, PEEQ, S
*Contact Output
CSTRESS,
**
** HISTORY OUTPUT: H-Output-1
**
*Output, history
*Energy Output
ALLIE, ALLKE, ETOTAL
**
** HISTORY OUTPUT: H-Output-3
**
*Node Output, nset=Beam-1.COD
U1,
**
** HISTORY OUTPUT: H-Output-2
**
*Node Output, nset=Fixture-1.RP
RF2, U2
**
** HISTORY OUTPUT: H-Output-4
**
*Node Output, nset=Fixture-2.RP
RF2, U2
*End Step
